*HEADING
Module 5 sine-arch truss bridge, PLA, total load 100 N
*NODE, NSET=NALL
1, 0.000000, 2.000000, 4.000000
2, 20.000000, 2.000000, 4.000000
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*ELEMENT, TYPE=B31, ELSET=SIDE_MEMBERS
1, 1, 2
2, 8, 9
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*ELEMENT, TYPE=B31, ELSET=CROSS_MEMBERS
63, 1, 15
64, 8, 22
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*MATERIAL, NAME=PLA
*ELASTIC
3000.0, 0.35
*BEAM SECTION, ELSET=SIDE_MEMBERS, MATERIAL=PLA, SECTION=CIRC
2.000
0.0, 1.0, 0.0
*BEAM SECTION, ELSET=CROSS_MEMBERS, MATERIAL=PLA, SECTION=CIRC
1.600
0.0, 0.0, 1.0
*STEP, INC=100
*STATIC
0.1, 1.0
*BOUNDARY
1, 1, 6, 0.0
15, 1, 6, 0.0
7, 2, 6, 0.0
21, 2, 6, 0.0
*CLOAD
2, 3, -10.000000
3, 3, -10.000000
4, 3, -10.000000
5, 3, -10.000000
6, 3, -10.000000
16, 3, -10.000000
17, 3, -10.000000
18, 3, -10.000000
19, 3, -10.000000
20, 3, -10.000000
*NODE FILE, OUTPUT=3D
U
*EL FILE
S, E
*NODE PRINT, NSET=NALL
U
*END STEP
